// SBML level 2 version 4

function GEXP__0_act___1_inh(inh, V, k_inh)
  V*(1/(1 + inh/k_inh));
end
GEXP__0_act___1_inh is "GEXP: 0 act, 1 inh";

function GEXP__1_act__0_inh(act, V, k_act)
  V/(1 + k_act/act);
end
GEXP__1_act__0_inh is "GEXP: 1 act, 0 inh";

function GEXP__1_act__1_inh(V, ka1, a1, i1, ki1)
  V/((1 + ka1/a1)*(1 + i1/ki1));
end
GEXP__1_act__1_inh is "GEXP: 1 act, 1 inh";

model New_Model()

  // Compartments:
  compartment compartment = 1;

  // Species:
  species G1 in compartment = 0;
  species G2 in compartment = 0;
  species G3 in compartment = 0;
  species G4 in compartment = 0;
  species G5 in compartment = 0;
  species species in compartment = 0;

  // Reactions:
  G1_syn: => G1; compartment*GEXP__1_act__0_inh(G4, G1_syn_V, G1_syn_k_act);  // modifiers: G4
    G1_syn_V = 1; G1_syn_k_act = 0.1;
  G1_deg: G1 => ; compartment*G1_deg_k1*G1;
    G1_deg_k1 = 0.5;
  G2_syn: => G2; compartment*GEXP__0_act___1_inh(G1, G2_syn_V, G2_syn_k_inh);  // modifiers: G1
    G2_syn_V = 1; G2_syn_k_inh = 0.1;
  G2_deg: G2 => ; compartment*G2_deg_k1*G2;
    G2_deg_k1 = 0.5;
  G3_syn: => G3; compartment*GEXP__1_act__0_inh(G2, G3_syn_V, G3_syn_k_act);  // modifiers: G2
    G3_syn_V = 1; G3_syn_k_act = 0.1;
  G3_deg: G3 => ; compartment*G3_deg_k1*G3;
    G3_deg_k1 = 0.5;
  G4_syn: => G4; compartment*GEXP__0_act___1_inh(G2, G4_syn_V, G4_syn_k_inh);  // modifiers: G2
    G4_syn_V = 1; G4_syn_k_inh = 0.1;
  G4_deg: G4 => ; compartment*G4_deg_k1*G4;
    G4_deg_k1 = 0.5;
  G5_syn: => G5; compartment*GEXP__1_act__1_inh(G5_syn_V, ka1, G4, G3, ki1);  // modifiers: G4, G3
    G5_syn_V = 1; ka1 = 0.1; ki1 = 0.1;
  G5_deg: G5 => ; compartment*G5_deg_k1*G5;
    G5_deg_k1 = 0.5;

  // Unit definitions:
  unit length = metre;
  unit area = metre^2;
  unit volume = litre;
  unit time = second;
  unit substance = mole;
end
